*Heading
** Job name: Job-5 Model name: Model-1
** Generated by: Abaqus/CAE 2022
*Preprint, echo=NO, model=NO, history=NO, contact=NO
**
** PARTS
**
*Part, name=Part-1
*Node
      1,          15.,          10.,  0.150000006
      2,          15.,          9.5,  0.150000006
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*Element, type=C3D8R
  1,   64,   65,   23,   22,   43,   44,    2,    1
  2,   65,   66,   24,   23,   44,   45,    3,    2
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*Orientation, name=Ori-1
          1.,           0.,           0.,           0.,           1.,           0.
3, 0.
** Region: (CompositeLayup-1-1: Generated From Layup), (Controls:EC-1)
*Elset, elset=CompositeLayup-1-1, generate
   1,  600,    1
** Section: CompositeLayup-1-1
*Solid Section, elset=CompositeLayup-1-1, composite, orientation=Ori-1, controls=EC-1, stack direction=3, layup=CompositeLayup-1
1., 1, UMat-T700, 0., Ply-1
*End Part
**
**
** ASSEMBLY
**
*Assembly, name=Assembly
**
*Instance, name=Part-1-1, part=Part-1
*End Instance
**
*Node
      1,          15.,           5.,  0.075000003
*Node
      2,           0.,           0.,           0.
*Nset, nset=Set-Nds, instance=Part-1-1, generate
  1,  42,   1
*Nset, nset=Set-RP
 1,
*Nset, nset=_PickedSet4, internal, instance=Part-1-1, generate
 1261,  1302,     1
*Elset, elset=_PickedSet4, internal, instance=Part-1-1, generate
 581,  600,    1
*Nset, nset=_PickedSet5, internal, instance=Part-1-1, generate
   21,  1302,    21
*Elset, elset=_PickedSet5, internal, instance=Part-1-1, generate
  20,  600,   20
*Nset, nset=_PickedSet8, internal, instance=Part-1-1
   22,   23,   24,   25,   26,   27
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*Elset, elset=_PickedSet8, internal, instance=Part-1-1, generate
   1,  600,    1
*Nset, nset=_PickedSet14, internal
 1,
** Constraint: Constraint-1
*Equation
2
Set-Nds, 1, 1.
Set-RP, 1, -1.
*End Assembly
**
** ELEMENT CONTROLS
**
*Section Controls, name=EC-1, hourglass=ENHANCED
1., 1., 1.
**
** MATERIALS
**
*Material, name=Mat-T700
*Elastic, type=ENGINEERING CONSTANTS
114000.,8610.,8610.,  0.3,  0.3, 0.45,4160.,4160.
3000.,
*Material, name=UMat-T700
*Depvar
      1,
*User Material, constants=7, unsymm
230000.,15000.,  0.27,  0.49,24000., 5030., 4900.
**
** BOUNDARY CONDITIONS
**
** Name: BC-X Type: Symmetry/Antisymmetry/Encastre
*Boundary
_PickedSet4, XSYMM
** Name: BC-Y Type: Symmetry/Antisymmetry/Encastre
*Boundary
_PickedSet5, YSYMM
** Name: BC-Z Type: Symmetry/Antisymmetry/Encastre
*Boundary
_PickedSet8, ZSYMM
** ----------------------------------------------------------------
**
** STEP: Step-1
**
*Step, name=Step-1, nlgeom=YES, inc=10000
*Static
0.01, 1., 1e-15, 0.01
**
** BOUNDARY CONDITIONS
**
** Name: U1 Type: Displacement/Rotation
*Boundary
_PickedSet14, 1, 1, 0.4
**
** OUTPUT REQUESTS
**
*Restart, write, frequency=0
**
** FIELD OUTPUT: F-Output-1
**
*Output, field, time interval=0.01
*Node Output
U,
*Element Output, directions=YES
E, S, SDV
**
** HISTORY OUTPUT: H-Output-1
**
*Output, history, time interval=0.01
*Node Output, nset=Set-RP
RF1, U1
*End Step
