*Heading
** Job name: Job-6 Model name: Model-1-Copy
** Generated by: Abaqus/CAE 2022
*Preprint, echo=NO, model=NO, history=NO, contact=NO
**
** PARTS
**
*Part, name=Part-1
*Node
      1,          15.,           0.,           0.
      2,         14.5,           0.,           0.
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*Element, type=SC8R
  1,   32,   33,    2,    1,  683,  684,  653,  652
  2,   33,   34,    3,    2,  684,  685,  654,  653
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*Nset, nset=Set-nds, generate
    1,  1272,    31
*Orientation, name=Ori-1
          1.,           0.,           0.,           0.,           1.,           0.
3, 0.
** Region: (CompositeLayup-1-1: Generated From Layup)
*Elset, elset=CompositeLayup-1-1, generate
   1,  600,    1
** Section: CompositeLayup-1-1
*Shell Section, elset=CompositeLayup-1-1, composite, orientation=Ori-1, stack direction=3, layup=CompositeLayup-1
1., 3, Material-3, 0., Ply-1
*End Part
**
**
** ASSEMBLY
**
*Assembly, name=Assembly
**
*Instance, name=Part-1-1, part=Part-1
*End Instance
**
*Node
      1,          15.,           5.,  0.075000003
*Node
      2,           0.,           0.,           0.
*Nset, nset=Set-RP
 1,
*Nset, nset=_PickedSet4, internal, instance=Part-1-1, generate
   31,  1302,    31
*Elset, elset=_PickedSet4, internal, instance=Part-1-1, generate
  30,  600,   30
*Nset, nset=_PickedSet5, internal, instance=Part-1-1
   1,   2,   3,   4,   5,   6
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*Elset, elset=_PickedSet5, internal, instance=Part-1-1, generate
  1,  30,   1
*Nset, nset=_PickedSet8, internal, instance=Part-1-1, generate
   1,  651,    1
*Elset, elset=_PickedSet8, internal, instance=Part-1-1, generate
   1,  600,    1
*Nset, nset=_PickedSet14, internal
 1,
** Constraint: Constraint-1
*Equation
2
Part-1-1.Set-nds, 1, 1.
Set-RP, 1, -1.
*End Assembly
**
** MATERIALS
**
*Material, name=Mat-T700
*Elastic, type=ENGINEERING CONSTANTS
114000.,8610.,8610.,  0.3,  0.3, 0.45,4160.,4160.
3000.,
*Material, name=Material-3
*Damage Initiation, criterion=HASHIN
4900., 2470.,   61.,  108., 41.03, 41.03
*Damage Evolution, type=ENERGY
 12.5, 12.5,   1.,   1.
*Elastic, type=LAMINA
230000.,15000.,  0.27,24000.,24000., 5030.
*Material, name=UMat-T700
*Depvar
      1,
*User Material, constants=7, unsymm
230000.,15000.,  0.27,  0.49,24000., 5030., 4900.
**
** BOUNDARY CONDITIONS
**
** Name: BC-X Type: Symmetry/Antisymmetry/Encastre
*Boundary
_PickedSet4, XSYMM
** Name: BC-Y Type: Symmetry/Antisymmetry/Encastre
*Boundary
_PickedSet5, YSYMM
** Name: BC-Z Type: Symmetry/Antisymmetry/Encastre
*Boundary
_PickedSet8, ZSYMM
** ----------------------------------------------------------------
**
** STEP: Step-1
**
*Step, name=Step-1, nlgeom=YES, inc=10000
*Static
0.01, 1., 1e-15, 0.01
**
** BOUNDARY CONDITIONS
**
** Name: U1 Type: Displacement/Rotation
*Boundary
_PickedSet14, 1, 1, 0.4
**
** OUTPUT REQUESTS
**
*Restart, write, frequency=0
**
** FIELD OUTPUT: F-Output-2
**
*Output, field
*Element Output, elset=Part-1-1.CompositeLayup-1-1, directions=YES
2
DAMAGEFC, DAMAGEFT, DAMAGEMC, DAMAGEMT, DAMAGESHR, DMICRT, LE, PE, PEEQ, S, SDEG, STATUS
**
** FIELD OUTPUT: F-Output-1
**
*Output, field, variable=PRESELECT, time interval=0.01
**
** HISTORY OUTPUT: H-Output-2
**
*Output, history, time interval=0.01
*Node Output, nset=Set-RP
RF1, U1
**
** HISTORY OUTPUT: H-Output-1
**
*Output, history, variable=PRESELECT, time interval=0.01
*End Step
